# OpenSim document version 40000
Model H0914M-scaled:
  gravity: 0 -9.80665 0
  length_units: meters
  force_units: N
  credits:
    Planar model with 9 degrees-of-freedom and 14 muscles. Adapted for SCONE from gait2392.osim by Thomas Geijtenbeek. 2021.02.15: initial version.
  publications:
    Geijtenbeek, T.: SCONE: Open Source Software for Biological Motion, Journal of Open Source Software 4(38), 2019. Delp, S.L., Loan, J.P., Hoy, M.G., Zajac, F.E., Topp E.L., Rosen, J.M.: An interactive graphics-based model of the lower extremity to study orthopaedic surgical procedures, IEEE Transactions on Biomedical Engineering, vol. 37, pp. 757-767, 1990. Yamaguchi G.T., Zajac F.E.: A planar model of the knee joint to characterize the knee extensor mechanism." J . Biomech. vol. 22. pp. 1-10. 1989. Anderson F.C., Pandy M.G.: A dynamic optimization solution for vertical jumping in three dimensions. Computer Methods in Biomechanics and Biomedical Engineering 2:201-231, 1999. Anderson F.C., Pandy M.G.: Dynamic optimization of human walking. Journal of Biomechanical Engineering 123:381-390, 2001.
  Ground
  BodySet:
    Body pelvis: mass=11.777 [kg] mass_center=(-0.0707 0 0) inertia=(0.1028 0.0871 0.0579 0 0 0)
        meshes=(sacrum.vtp pelvis.vtp l_pelvis.vtp)
    Body femur_r: mass=9.3014 mass_center=(0 -0.17 0) inertia=(0.1339 0.0351 0.1412 0 0 0) meshes=femur.vtp
    Body tibia_r: mass=3.7075 mass_center=(0 -0.1867 0) inertia=(0.0504 0.0051 0.0511 0 0 0)
        meshes=(tibia.vtp fibula.vtp)
    Body talus_r: mass=0.1 mass_center=(0 0 0) inertia=(0.001 0.001 0.001 0 0 0) meshes=talus.vtp
    Body calcn_r: mass=1.25 mass_center=(0.1 0.03 0) inertia=(0.0014 0.0039 0.0041 0 0 0) meshes=foot.vtp
    Body toes_r: mass=0.2166 mass_center=(0.0346 0.006 -0.0175) inertia=(0.0001 0.0002 0.0001 0 0 0) meshes=bofoot.vtp
    Body femur_l: mass=9.3014 mass_center=(0 -0.17 0) inertia=(0.1339 0.0351 0.1412 0 0 0) meshes=l_femur.vtp
    Body tibia_l: mass=3.7075 mass_center=(0 -0.1867 0) inertia=(0.0504 0.0051 0.0511 0 0 0)
        meshes=(l_tibia.vtp l_fibula.vtp)
    Body talus_l: mass=0.1 mass_center=(0 0 0) inertia=(0.001 0.001 0.001 0 0 0) meshes=l_talus.vtp
    Body calcn_l: mass=1.25 mass_center=(0.1 0.03 0) inertia=(0.0014 0.0039 0.0041 0 0 0) meshes=l_foot.vtp
    Body toes_l: mass=0.2166 mass_center=(0.0346 0.006 0.0175) inertia=(0.0001 0.0002 0.0001 0 0 0) meshes=l_bofoot.vtp
    Body torso: mass=34.2366 mass_center=(-0.03 0.32 0) inertia=(1.4745 0.7555 1.4314 0 0 0)
        meshes=(hat_spine.vtp hat_jaw.vtp hat_skull.vtp hat_ribs.vtp)
    Body head: mass=0 mass_center=(0 0 0) inertia=(0 0 0 0 0 0)
  JointSet:
    CustomJoint ground_pelvis: socket_parent_frame=ground_offset socket_child_frame=pelvis_offset
      Coordinate pelvis_tilt: default_value=0 range=(-1.570796 1.570796) clamped=false
      Coordinate pelvis_list: default_value=0 range=(-1.570796 1.570796) clamped=false locked=true
      Coordinate pelvis_rotation: default_value=0 range=(-1.570796 1.570796) clamped=false
      Coordinate pelvis_tx: default_value=0 range=(-5 5) clamped=false
      Coordinate pelvis_ty: default_value=0.94 range=(-1 2) clamped=false
      Coordinate pelvis_tz: default_value=0 range=(-3 3) clamped=false
      PhysicalOffsetFrame ground_offset: socket_parent=/ground translation=(0 0 0) [meters]
      PhysicalOffsetFrame pelvis_offset: socket_parent=/bodyset/pelvis translation=(0 0 0)
      SpatialTransform:
        TransformAxis rotation1: coordinates=pelvis_tilt axis=(0 0 1) LinearFunction(coefficients=1 0)
        TransformAxis rotation2: coordinates=pelvis_list axis=(1 0 0) LinearFunction(coefficients=1 0)
        TransformAxis rotation3: coordinates=pelvis_rotation axis=(0 1 0) LinearFunction(coefficients=1 0)
        TransformAxis translation1: coordinates=pelvis_tx axis=(1 0 0) LinearFunction(coefficients=1 0)
        TransformAxis translation2: coordinates=pelvis_ty axis=(0 1 0) LinearFunction(coefficients=1 0)
        TransformAxis translation3: coordinates=pelvis_tz axis=(0 0 1) LinearFunction(coefficients=1 0)
    CustomJoint hip_r: socket_parent_frame=pelvis_offset socket_child_frame=femur_r_offset
      Coordinate hip_flexion_r: default_value=0 range=(-2.094395 2.094395) clamped=false
      Coordinate hip_adduction_r: default_value=0 range=(-2.094395 2.094395) clamped=false locked=true
      Coordinate hip_rotation_r: default_value=0 range=(-2.094395 2.094395) clamped=false locked=true
      PhysicalOffsetFrame pelvis_offset: socket_parent=/bodyset/pelvis translation=(-0.0707 -0.0661 0.0835)
      PhysicalOffsetFrame femur_r_offset: socket_parent=/bodyset/femur_r translation=(0 0 0)
      SpatialTransform: axes_held_at_zero=(translation1 translation2 translation3)
        TransformAxis rotation1: coordinates=hip_flexion_r axis=(0 0 1) LinearFunction(coefficients=1 0)
        TransformAxis rotation2: coordinates=hip_adduction_r axis=(1 0 0) LinearFunction(coefficients=1 0)
        TransformAxis rotation3: coordinates=hip_rotation_r axis=(0 1 0) LinearFunction(coefficients=1 0)
    CustomJoint knee_r: socket_parent_frame=femur_r_offset socket_child_frame=tibia_r_offset
      Coordinate knee_angle_r: default_value=0 range=(-2.094395 0.1745329) clamped=false
      PhysicalOffsetFrame femur_r_offset: socket_parent=/bodyset/femur_r translation=(0 0 0)
      PhysicalOffsetFrame tibia_r_offset: socket_parent=/bodyset/tibia_r translation=(0 0 0)
      SpatialTransform: axes_held_at_zero=(rotation2 rotation3 translation3)
        TransformAxis rotation1: coordinates=knee_angle_r axis=(0 0 1) LinearFunction(coefficients=1 0)
        TransformAxis translation1: coordinates=knee_angle_r axis=(1 0 0)
          MultiplierFunction: scale=1
            SimmSpline: x=(-2.0944 -1.74533 -1.39626 -1.0472 -0.698132 -0.349066 -0.174533 0.197344 0.337395 0.490178 1.52146 2.0944)
                y=(-0.0032 0.00179 0.00411 0.0041 0.00212 -0.001 -0.0031 -0.005227 -0.005435 -0.005574 -0.005435 -0.00525)
        TransformAxis translation2: coordinates=knee_angle_r axis=(0 1 0)
          MultiplierFunction: scale=1
            SimmSpline: x=(-2.0944 -1.22173 -0.523599 -0.349066 -0.174533 0.159149 2.0944)
                y=(-0.4226 -0.4082 -0.399 -0.3976 -0.3966 -0.395264 -0.396)
    PinJoint ankle_r: socket_parent_frame=tibia_r_offset socket_child_frame=talus_r_offset
      Coordinate ankle_angle_r: default_value=0 range=(-1.570796 1.570796) clamped=false
      PhysicalOffsetFrame tibia_r_offset: socket_parent=/bodyset/tibia_r translation=(0 -0.43 0)
      PhysicalOffsetFrame talus_r_offset: socket_parent=/bodyset/talus_r translation=(0 0 0)
    WeldJoint subtalar_r: socket_parent_frame=talus_r_offset socket_child_frame=calcn_r_offset
      PhysicalOffsetFrame talus_r_offset: socket_parent=/bodyset/talus_r translation=(-0.04877 -0.04195 0.00792)
      PhysicalOffsetFrame calcn_r_offset: socket_parent=/bodyset/calcn_r translation=(0 0 0)
    WeldJoint mtp_r: socket_parent_frame=calcn_r_offset socket_child_frame=toes_r_offset
      PhysicalOffsetFrame calcn_r_offset: socket_parent=/bodyset/calcn_r translation=(0.1788 -0.002 0.00108)
      PhysicalOffsetFrame toes_r_offset: socket_parent=/bodyset/toes_r translation=(0 0 0)
    CustomJoint hip_l: socket_parent_frame=pelvis_offset socket_child_frame=femur_l_offset
      Coordinate hip_flexion_l: default_value=0 range=(-2.094395 2.094395) clamped=false
      Coordinate hip_adduction_l: default_value=0 range=(-2.094395 2.094395) clamped=false locked=true
      Coordinate hip_rotation_l: default_value=0 range=(-2.094395 2.094395) clamped=false locked=true
      PhysicalOffsetFrame pelvis_offset: socket_parent=/bodyset/pelvis translation=(-0.0707 -0.0661 -0.0835)
      PhysicalOffsetFrame femur_l_offset: socket_parent=/bodyset/femur_l translation=(0 0 0)
      SpatialTransform: axes_held_at_zero=(translation1 translation2 translation3)
        TransformAxis rotation1: coordinates=hip_flexion_l axis=(0 0 1) LinearFunction(coefficients=1 0)
        TransformAxis rotation2: coordinates=hip_adduction_l axis=(-1 0 0) LinearFunction(coefficients=1 0)
        TransformAxis rotation3: coordinates=hip_rotation_l axis=(0 -1 0) LinearFunction(coefficients=1 0)
    CustomJoint knee_l: socket_parent_frame=femur_l_offset socket_child_frame=tibia_l_offset
      Coordinate knee_angle_l: default_value=0 range=(-2.094395 0.1745329) clamped=false
      PhysicalOffsetFrame femur_l_offset: socket_parent=/bodyset/femur_l translation=(0 0 0)
      PhysicalOffsetFrame tibia_l_offset: socket_parent=/bodyset/tibia_l translation=(0 0 0)
      SpatialTransform: axes_held_at_zero=(rotation2 rotation3 translation3)
        TransformAxis rotation1: coordinates=knee_angle_l axis=(0 0 1) LinearFunction(coefficients=1 0)
        TransformAxis translation1: coordinates=knee_angle_l axis=(1 0 0)
          MultiplierFunction: scale=1
            SimmSpline: x=(-2.0944 -1.74533 -1.39626 -1.0472 -0.698132 -0.349066 -0.174533 0.197344 0.337395 0.490178 1.52146 2.0944)
                y=(-0.0032 0.00179 0.00411 0.0041 0.00212 -0.001 -0.0031 -0.005227 -0.005435 -0.005574 -0.005435 -0.00525)
        TransformAxis translation2: coordinates=knee_angle_l axis=(0 1 0)
          MultiplierFunction: scale=1
            SimmSpline: x=(-2.0944 -1.22173 -0.523599 -0.349066 -0.174533 0.159149 2.0944)
                y=(-0.4226 -0.4082 -0.399 -0.3976 -0.3966 -0.395264 -0.396)
    PinJoint ankle_l: socket_parent_frame=tibia_l_offset socket_child_frame=talus_l_offset
      Coordinate ankle_angle_l: default_value=0 range=(-1.047198 1.047198) clamped=false
      PhysicalOffsetFrame tibia_l_offset: socket_parent=/bodyset/tibia_l translation=(0 -0.43 0)
      PhysicalOffsetFrame talus_l_offset: socket_parent=/bodyset/talus_l translation=(0 0 0)
    WeldJoint subtalar_l: socket_parent_frame=talus_l_offset socket_child_frame=calcn_l_offset
      PhysicalOffsetFrame talus_l_offset: socket_parent=/bodyset/talus_l translation=(-0.04877 -0.04195 -0.00792)
      PhysicalOffsetFrame calcn_l_offset: socket_parent=/bodyset/calcn_l translation=(0 0 0)
    WeldJoint mtp_l: socket_parent_frame=calcn_l_offset socket_child_frame=toes_l_offset
      PhysicalOffsetFrame calcn_l_offset: socket_parent=/bodyset/calcn_l translation=(0.1788 -0.002 -0.00108)
      PhysicalOffsetFrame toes_l_offset: socket_parent=/bodyset/toes_l translation=(0 0 0)
    PinJoint back: socket_parent_frame=pelvis_offset socket_child_frame=torso_offset
      Coordinate lumbar_extension: default_value=-0.0872665 range=(-1.570796 1.570796) clamped=false locked=true
      PhysicalOffsetFrame pelvis_offset: socket_parent=/bodyset/pelvis translation=(-0.1007 0.0815 0)
      PhysicalOffsetFrame torso_offset: socket_parent=/bodyset/torso translation=(0 0 0)
    WeldJoint back_0: socket_parent_frame=torso_offset socket_child_frame=head_offset
      PhysicalOffsetFrame torso_offset: socket_parent=/bodyset/torso translation=(0 0.55 0)
      PhysicalOffsetFrame head_offset: socket_parent=/bodyset/head translation=(0 0 0)
  ForceSet:
    Millard2012EquilibriumMuscle [values shared by the 14 below unless stated]: optimal_force=1
        max_contraction_velocity=10 activation_time_constant=0.01 [seconds] deactivation_time_constant=0.04 [seconds]
        minimum_activation=0.01
      ActiveForceLengthCurve: minimum_value=0
      ForceVelocityCurve: concentric_slope_at_vmax=0 concentric_slope_near_vmax=0.25 isometric_slope=5
          eccentric_slope_at_vmax=0 eccentric_slope_near_vmax=0.15 max_eccentric_velocity_force_multiplier=1.4
      FiberForceLengthCurve
      TendonForceLengthCurve
    Millard2012EquilibriumMuscle hamstrings_r: max_isometric_force=2594 optimal_fiber_length=0.109
        tendon_slack_length=0.31 pennation_angle_at_optimal=0 [radians]
      PathPoint bifemlh_r-P1: pelvis (-0.12596 -0.10257 0.06944)
      PathPoint bifemlh_r-P2: tibia_r (-0.028 -0.02 0.02943)
      PathPoint bifemlh_r-P3: tibia_r (-0.021 -0.04 0.0343)
    Millard2012EquilibriumMuscle glut_max_r: max_isometric_force=1944 optimal_fiber_length=0.147
        tendon_slack_length=0.127 pennation_angle_at_optimal=0
      PathPoint glut_max2_r-P1: pelvis (-0.1349 0.0176 0.0563)
      PathPoint glut_max2_r-P2: pelvis (-0.1376 -0.052 0.0914)
      PathPoint glut_max2_r-P3: femur_r (-0.0426 -0.053 0.0293)
      PathPoint glut_max2_r-P4: femur_r (-0.0156 -0.1016 0.0419)
    Millard2012EquilibriumMuscle iliopsoas_r: max_isometric_force=2342 optimal_fiber_length=0.1
        tendon_slack_length=0.163 pennation_angle_at_optimal=0.1396263
      PathPoint psoas_r-P1: pelvis (-0.0647 0.0887 0.0289)
      PathPoint psoas_r-P2: pelvis (-0.03 -0.01 0.076)
      PathPoint psoas_r-P4: femur_r (0.033 -0.035 0.0038)
      PathPoint psoas_r-P5: femur_r (-0.0188 -0.0597 0.0104)
    Millard2012EquilibriumMuscle vasti_r: max_isometric_force=4530 optimal_fiber_length=0.087 tendon_slack_length=0.136
        pennation_angle_at_optimal=0.05235988
      PathPoint vas_int_r-P1: femur_r (0.029 -0.1924 0.031)
      PathPoint vas_int_r-P2: femur_r (0.0335 -0.2084 0.0285)
      PathPoint default: tibia_r (0.04 0.025 0.0018)
    Millard2012EquilibriumMuscle gastroc_r: max_isometric_force=2241 optimal_fiber_length=0.06 tendon_slack_length=0.39
        pennation_angle_at_optimal=0.296706
      PathPoint med_gas_r-P1: femur_r (-0.02 -0.386 -0.024)
      PathPoint med_gas_r-P3: calcn_r (0 0.031 -0.0053)
    Millard2012EquilibriumMuscle soleus_r: max_isometric_force=3549 optimal_fiber_length=0.05 tendon_slack_length=0.25
        pennation_angle_at_optimal=0.4363323
      PathPoint P1: tibia_r (-0.0024 -0.1533 0.0071)
      PathPoint P2: calcn_r (0 0.031 -0.0053)
    Millard2012EquilibriumMuscle tib_ant_r: max_isometric_force=1759 optimal_fiber_length=0.098
        tendon_slack_length=0.223 pennation_angle_at_optimal=0.08726646
      PathPoint P1: tibia_r (0.0179 -0.1624 0.0115)
      PathPoint P2: tibia_r (0.0329 -0.3951 -0.0177)
      PathPoint P3: calcn_r (0.1166 0.0178 -0.0305)
    Millard2012EquilibriumMuscle hamstrings_l: max_isometric_force=2594 optimal_fiber_length=0.109
        tendon_slack_length=0.31 pennation_angle_at_optimal=0
      PathPoint bifemlh_l-P1: pelvis (-0.12596 -0.10257 -0.06944)
      PathPoint bifemlh_l-P2: tibia_l (-0.028 -0.02 -0.02943)
      PathPoint bifemlh_l-P3: tibia_l (-0.021 -0.04 -0.0343)
    Millard2012EquilibriumMuscle glut_max_l: max_isometric_force=1944 optimal_fiber_length=0.147
        tendon_slack_length=0.127 pennation_angle_at_optimal=0
      PathPoint glut_max2_l-P1: pelvis (-0.1349 0.0176 -0.0563)
      PathPoint glut_max2_l-P2: pelvis (-0.1376 -0.052 -0.0914)
      PathPoint glut_max2_l-P3: femur_l (-0.0426 -0.053 -0.0293)
      PathPoint glut_max2_l-P4: femur_l (-0.0156 -0.1016 -0.0419)
    Millard2012EquilibriumMuscle iliopsoas_l: max_isometric_force=2342 optimal_fiber_length=0.1
        tendon_slack_length=0.163 pennation_angle_at_optimal=0.1396263
      PathPoint psoas_l-P1: pelvis (-0.0647 0.0887 -0.0289)
      PathPoint psoas_l-P2: pelvis (-0.03 -0.01 -0.076)
      PathPoint psoas_l-P4: femur_l (0.033 -0.035 -0.0038)
      PathPoint psoas_l-P5: femur_l (-0.0188 -0.0597 -0.0104)
    Millard2012EquilibriumMuscle vasti_l: max_isometric_force=4530 optimal_fiber_length=0.087 tendon_slack_length=0.136
        pennation_angle_at_optimal=0.05235988
      PathPoint vas_int_l-P1: femur_l (0.029 -0.1924 -0.031)
      PathPoint vas_int_l-P2: femur_l (0.0335 -0.2084 -0.0285)
      PathPoint default: tibia_l (0.04 0.025 -0.0018)
    Millard2012EquilibriumMuscle gastroc_l: max_isometric_force=2241 optimal_fiber_length=0.06 tendon_slack_length=0.39
        pennation_angle_at_optimal=0.296706
      PathPoint med_gas_l-P1: femur_l (-0.02 -0.386 0.024)
      PathPoint med_gas_l-P3: calcn_l (0 0.031 0.0053)
    Millard2012EquilibriumMuscle soleus_l: max_isometric_force=3549 optimal_fiber_length=0.05 tendon_slack_length=0.25
        pennation_angle_at_optimal=0.4363323
      PathPoint P1: tibia_l (-0.0024 -0.1533 -0.0071)
      PathPoint P2: calcn_l (0 0.031 0.0053)
    Millard2012EquilibriumMuscle tib_ant_l: max_isometric_force=1759 optimal_fiber_length=0.098
        tendon_slack_length=0.223 pennation_angle_at_optimal=0.08726646
      PathPoint P1: tibia_l (0.0179 -0.1624 -0.0115)
      PathPoint P2: tibia_l (0.0329 -0.3951 0.0177)
      PathPoint P3: calcn_l (0.1166 0.0178 0.0305)
    HuntCrossleyForce foot_r: transition_velocity=0.15
      ContactParametersSet contact_parameters:
        ContactParameters: geometry=(platform r_heel r_toe) stiffness=2000000 dissipation=1 static_friction=0.9
            dynamic_friction=0.6 viscous_friction=0.6
    HuntCrossleyForce foot_l: transition_velocity=0.15
      ContactParametersSet contact_parameters:
        ContactParameters: geometry=(platform l_heel l_toe) stiffness=2000000 dissipation=1 static_friction=0.9
            dynamic_friction=0.6 viscous_friction=0.6
    CoordinateLimitForce KneeLimit_r: coordinate=knee_angle_r upper_stiffness=2 [N*m/degree] upper_limit=-5 [degrees]
        lower_stiffness=2 [N*m/degree] lower_limit=-120 [degrees] damping=0.2 transition=0.01 [degrees]
    CoordinateLimitForce KneeLimit_l: coordinate=knee_angle_l upper_stiffness=2 upper_limit=-5 lower_stiffness=2
        lower_limit=-120 damping=0.2 transition=0.01
  MarkerSet:
    Marker r.ASIS_study: pelvis (0.03160357 -0.001733481 0.1585075)
    Marker L.ASIS_study: pelvis (0.05154963 0.003067368 -0.1454389)
    Marker r.PSIS_study: pelvis (-0.1799662 0.02214083 0.05081554)
    Marker L.PSIS_study: pelvis (-0.1715504 0.02379007 -0.06811787)
    Marker r_knee_study: femur_r (0.02867127 -0.3756131 0.06558213)
    Marker r_mknee_study: femur_r (0.035591 -0.3782907 -0.04511934)
    Marker r_ankle_study: tibia_r (-0.02544123 -0.4103649 0.05291866)
    Marker r_mankle_study: tibia_r (0.003663008 -0.408147 -0.04391321)
    Marker r_toe_study: calcn_r (0.2140056 0.01077027 0.00564315)
    Marker r_5meta_study: calcn_r (0.1615511 0.009278249 0.07063501)
    Marker r_calc_study: calcn_r (-0.0318106 0.04518022 -0.01840731)
    Marker L_knee_study: femur_l (0.01015604 -0.3794941 -0.05871873)
    Marker L_mknee_study: femur_l (0.008737315 -0.379927 0.05434524)
    Marker L_ankle_study: tibia_l (-0.035624 -0.4084333 -0.05719272)
    Marker L_mankle_study: tibia_l (-0.007587181 -0.4019441 0.03889481)
    Marker L_toe_study: calcn_l (0.2071868 0.01328242 -0.004884294)
    Marker L_calc_study: calcn_l (-0.0417392 0.0407029 0.01171217)
    Marker L_5meta_study: calcn_l (0.155173 0.007292499 -0.07138148)
    Marker r_shoulder_study: torso (-0.01381157 0.4565414 0.1634963)
    Marker L_shoulder_study: torso (0.002907429 0.4635195 -0.1574419)
    Marker C7_study: torso (-0.09720825 0.459993 0.002614029)
    Marker r_thigh1_study: femur_r (0.08784602 -0.1279914 0.07641998)
    Marker r_thigh2_study: femur_r (0.06096108 -0.2245097 0.09217463)
    Marker r_thigh3_study: femur_r (-0.02201075 -0.1270325 0.1031277)
    Marker L_thigh1_study: femur_l (0.09707143 -0.1335427 -0.06934288)
    Marker L_thigh2_study: femur_l (0.06118698 -0.2289016 -0.08667796)
    Marker r_sh1_study: tibia_r (0.0110237 -0.1182947 0.08229731)
    Marker r_sh2_study: tibia_r (0.0326882 -0.2448158 0.08879168)
    Marker r_sh3_study: tibia_r (-0.04959851 -0.2296221 0.08637827)
    Marker L_sh1_study: tibia_l (-0.008335671 -0.1183754 -0.07630894)
    Marker L_sh2_study: tibia_l (0.0176377 -0.245479 -0.08662367)
    Marker L_sh3_study: tibia_l (-0.0638152 -0.2291723 -0.08683543)
    Marker RHJC_study: pelvis (-0.0813152 -0.09137566 0.09350613)
    Marker LHJC_study: pelvis (-0.068308 -0.08775319 -0.09973003)
  ContactGeometrySet:
    ContactHalfSpace platform: socket_frame=/ground location=(0 0 0) orientation=(0 0 -1.570796)
    ContactSphere r_heel: socket_frame=/bodyset/calcn_r location=(0.015 0.015 -0.005) radius=0.03
    ContactSphere r_toe: socket_frame=/bodyset/calcn_r location=(0.185 0.015 0) radius=0.03
    ContactSphere l_heel: socket_frame=/bodyset/calcn_l location=(0.015 0.015 0.005) radius=0.03
    ContactSphere l_toe: socket_frame=/bodyset/calcn_l location=(0.185 0.015 0) radius=0.03
