# OpenSim document version 30000
MarkerSet:
  Marker r.ASIS_study: pelvis (0.0354087 -0.01055013 0.159054)
  Marker L.ASIS_study: pelvis (0.0373299 -0.01348628 -0.1556303)
  Marker r.PSIS_study: pelvis (-0.1819027 0.03448269 0.06070146)
  Marker L.PSIS_study: pelvis (-0.1816822 0.0330356 -0.06254922)
  Marker r_knee_study: femur_r (0.007256822 -0.3907678 0.06351846)
  Marker r_mknee_study: femur_r (0.01016584 -0.3891005 -0.06031011)
  Marker r_ankle_study: tibia_r (-0.02370321 -0.3961054 0.05218278)
  Marker r_mankle_study: tibia_r (0.009022153 -0.3903603 -0.03842869)
  Marker r_toe_study: calcn_r (0.1971634 0.01616465 0.006865252)
  Marker r_5meta_study: calcn_r (0.1501571 0.01123496 0.06809159)
  Marker r_calc_study: calcn_r (-0.02732612 0.04647615 -0.01123772)
  Marker L_knee_study: femur_l (0.0001263232 -0.3914314 -0.06958732)
  Marker L_mknee_study: femur_l (0.002240325 -0.391347 0.05305453)
  Marker L_ankle_study: tibia_l (-0.02173869 -0.3967671 -0.0512719)
  Marker L_mankle_study: tibia_l (0.009003603 -0.387181 0.03925559)
  Marker L_toe_study: calcn_l (0.2020856 0.01208135 -0.006208006)
  Marker L_calc_study: calcn_l (-0.02806485 0.03714435 0.01493508)
  Marker L_5meta_study: calcn_l (0.1515007 0.007315478 -0.06586871)
  Marker r_shoulder_study: torso (0.01160402 0.3983771 0.1568497)
  Marker L_shoulder_study: torso (0.009189735 0.3989337 -0.1595448)
  Marker C7_study: torso (-0.08328056 0.4004673 0.004188639)
  Marker r_thigh1_study: femur_r (0.09174643 -0.135858 0.08131341)
  Marker r_thigh2_study: femur_r (0.05579176 -0.2358639 0.09754015)
  Marker r_thigh3_study: femur_r (-0.03129899 -0.1277228 0.1146558)
  Marker L_thigh1_study: femur_l (0.09100674 -0.1365353 -0.08160049)
  Marker L_thigh2_study: femur_l (0.05350782 -0.2362768 -0.1002987)
  Marker L_thigh3_study: femur_l (-0.03290145 -0.129684 -0.119176)
  Marker r_sh1_study: tibia_r (-0.0127687 -0.1092604 0.07256841)
  Marker r_sh2_study: tibia_r (0.0172586 -0.2293827 0.08417517)
  Marker r_sh3_study: tibia_r (-0.0610719 -0.2219631 0.07668336)
  Marker L_sh1_study: tibia_l (-0.01498943 -0.1127724 -0.07503955)
  Marker L_sh2_study: tibia_l (0.01693154 -0.2338572 -0.08320741)
  Marker L_sh3_study: tibia_l (-0.06082591 -0.2250562 -0.08074947)
  Marker RHJC_study: pelvis (-0.08413742 -0.08659785 0.09533214)
  Marker LHJC_study: pelvis (-0.08240642 -0.08834654 -0.09671127)
