# OpenSim document version 40000
ScaleTool model-scaled:
  mass: 75.1646 [kg]
  height: -1
  age: -1
  GenericModelMaker:
    marker_set_file: markers.xml
  ModelScaler:
    apply: true
    marker_file: ../experimental_data/neutral.trc
    time_range: 0 1.86667
    preserve_mass_distribution: true
  MarkerPlacer:
    apply: true
    marker_file: ../experimental_data/neutral.trc
    time_range: 0 1.86667
    max_marker_movement: -1
    IKTaskSet:
      IKMarkerTask r.ASIS_study: apply=true weight=1
      IKMarkerTask L.ASIS_study: apply=true weight=1
      IKMarkerTask r.PSIS_study: apply=true weight=1
      IKMarkerTask L.PSIS_study: apply=true weight=1
      IKMarkerTask r_knee_study: apply=true weight=1
      IKMarkerTask r_mknee_study: apply=true weight=1
      IKMarkerTask r_ankle_study: apply=true weight=1
      IKMarkerTask r_mankle_study: apply=true weight=1
      IKMarkerTask r_toe_study: apply=true weight=1
      IKMarkerTask r_5meta_study: apply=true weight=1
      IKMarkerTask r_calc_study: apply=true weight=1
      IKMarkerTask L_knee_study: apply=true weight=1
      IKMarkerTask L_mknee_study: apply=true weight=1
      IKMarkerTask L_ankle_study: apply=true weight=1
      IKMarkerTask L_mankle_study: apply=true weight=1
      IKMarkerTask L_toe_study: apply=true weight=1
      IKMarkerTask L_calc_study: apply=true weight=1
      IKMarkerTask L_5meta_study: apply=true weight=1
      IKMarkerTask r_shoulder_study: apply=true weight=1
      IKMarkerTask L_shoulder_study: apply=true weight=1
      IKMarkerTask C7_study: apply=true weight=1
      IKMarkerTask r_thigh1_study: apply=true weight=1
      IKMarkerTask r_thigh2_study: apply=true weight=1
      IKMarkerTask r_thigh3_study: apply=true weight=1
      IKMarkerTask L_thigh1_study: apply=true weight=1
      IKMarkerTask L_thigh2_study: apply=true weight=1
      IKMarkerTask L_thigh3_study: apply=true weight=1
      IKMarkerTask r_sh1_study: apply=true weight=1
      IKMarkerTask r_sh2_study: apply=true weight=1
      IKMarkerTask r_sh3_study: apply=true weight=1
      IKMarkerTask L_sh1_study: apply=true weight=1
      IKMarkerTask L_sh2_study: apply=true weight=1
      IKMarkerTask L_sh3_study: apply=true weight=1
      IKMarkerTask RHJC_study: apply=true weight=1
      IKMarkerTask LHJC_study: apply=true weight=1
