# OpenSim document version 40500
ControlSet Control Set:
  ControlLinear [values shared by the 18 below unless stated]: is_model_control=true extrapolate=true default_min=0.02
      default_max=1 filter_on=false use_steps=false kp=100 kv=20
  ControlLinear hamstrings_r:
    x_nodes:
      ControlLinearNode: t=12.03333 value=0.01068191
      ControlLinearNode: t=12.06667 value=0.0105866
      ControlLinearNode: t=12.1 value=0.02658932
      ControlLinearNode: t=12.13333 value=0.03131804
  ControlLinear bifemsh_r:
    x_nodes:
      ControlLinearNode: t=12.03333 value=0.02808447
      ControlLinearNode: t=12.06667 value=0.02998027
      ControlLinearNode: t=12.1 value=0.1594215
      ControlLinearNode: t=12.13333 value=0.2984218
  ControlLinear glut_max_r:
    x_nodes:
      ControlLinearNode: t=12.03333 value=0.0115624
      ControlLinearNode: t=12.06667 value=0.01124548
      ControlLinearNode: t=12.1 value=0.03729978
      ControlLinearNode: t=12.13333 value=0.04907136
  ControlLinear iliopsoas_r:
    x_nodes:
      ControlLinearNode: t=12.03333 value=0.8207004
      ControlLinearNode: t=12.06667 value=0.9461088
      ControlLinearNode: t=12.1 value=0.9329186
      ControlLinearNode: t=12.13333 value=0.93636
  ControlLinear rect_fem_r:
    x_nodes:
      ControlLinearNode: t=12.03333 value=0.5059873
      ControlLinearNode: t=12.06667 value=0.6108367
      ControlLinearNode: t=12.1 value=0.6501784
      ControlLinearNode: t=12.13333 value=0.6996397
  ControlLinear vasti_r:
    x_nodes:
      ControlLinearNode: t=12.03333 value=0.08001672
      ControlLinearNode: t=12.06667 value=0.05731153
      ControlLinearNode: t=12.1 value=0.04990673
      ControlLinearNode: t=12.13333 value=0.04215392
  ControlLinear gastroc_r:
    x_nodes:
      ControlLinearNode: t=12.03333 value=0.02567491
      ControlLinearNode: t=12.06667 value=0.0290584
      ControlLinearNode: t=12.1 value=0.1478698
      ControlLinearNode: t=12.13333 value=0.3003351
  ControlLinear soleus_r:
    x_nodes:
      ControlLinearNode: t=12.03333 value=0.03068694
      ControlLinearNode: t=12.06667 value=0.03140365
      ControlLinearNode: t=12.1 value=0.1238041
      ControlLinearNode: t=12.13333 value=0.207897
  ControlLinear tib_ant_r:
    x_nodes:
      ControlLinearNode: t=12.03333 value=0.0330886
      ControlLinearNode: t=12.06667 value=0.03259343
      ControlLinearNode: t=12.1 value=0.1733872
      ControlLinearNode: t=12.13333 value=0.2499378
  ControlLinear hamstrings_l:
    x_nodes:
      ControlLinearNode: t=12.03333 value=0.9878588
      ControlLinearNode: t=12.06667 value=0.9997913
      ControlLinearNode: t=12.1 value=0.9999919
      ControlLinearNode: t=12.13333 value=1
  ControlLinear bifemsh_l:
    x_nodes:
      ControlLinearNode: t=12.03333 value=0.04482757
      ControlLinearNode: t=12.06667 value=0.1295859
      ControlLinearNode: t=12.1 value=0.1892687
      ControlLinearNode: t=12.13333 value=0.2837782
  ControlLinear glut_max_l:
    x_nodes:
      ControlLinearNode: t=12.03333 value=0.6179369
      ControlLinearNode: t=12.06667 value=0.9995901
      ControlLinearNode: t=12.1 value=0.9999877
      ControlLinearNode: t=12.13333 value=1
  ControlLinear iliopsoas_l:
    x_nodes:
      ControlLinearNode: t=12.03333 value=0.01124002
      ControlLinearNode: t=12.06667 value=0.01026985
      ControlLinearNode: t=12.1 value=0.01001122
      ControlLinearNode: t=12.13333 value=0.01000001
  ControlLinear rect_fem_l:
    x_nodes:
      ControlLinearNode: t=12.03333 value=0.01147601
      ControlLinearNode: t=12.06667 value=0.0102942
      ControlLinearNode: t=12.1 value=0.01001338
      ControlLinearNode: t=12.13333 value=0.01000002
  ControlLinear vasti_l:
    x_nodes:
      ControlLinearNode: t=12.03333 value=0.0130654
      ControlLinearNode: t=12.06667 value=0.01058677
      ControlLinearNode: t=12.1 value=0.02282933
      ControlLinearNode: t=12.13333 value=0.05019624
  ControlLinear gastroc_l:
    x_nodes:
      ControlLinearNode: t=12.03333 value=0.06953869
      ControlLinearNode: t=12.06667 value=0.1773513
      ControlLinearNode: t=12.1 value=0.1792814
      ControlLinearNode: t=12.13333 value=0.2094908
  ControlLinear soleus_l:
    x_nodes:
      ControlLinearNode: t=12.03333 value=0.0285003
      ControlLinearNode: t=12.06667 value=0.01202007
      ControlLinearNode: t=12.1 value=0.04702912
      ControlLinearNode: t=12.13333 value=0.07728625
  ControlLinear tib_ant_l:
    x_nodes:
      ControlLinearNode: t=12.03333 value=0.03360902
      ControlLinearNode: t=12.06667 value=0.1204293
      ControlLinearNode: t=12.1 value=0.2209968
      ControlLinearNode: t=12.13333 value=0.3602546
